# Coarse-grained bottlebrush
units  lj
atom_style  angle
boundary    p p p

# Minimization run

read_data final0.cfg
mass  * 1.0

pair_style gauss 23
pair_coeff 1 1 -3.12 0.006420276
pair_coeff 1 2 -3.12 0.006797444
pair_coeff 1 3 -3.12 0.007211539
pair_coeff 1 4 -3.12 0.007664659
pair_coeff 1 5 -3.12 0.008161867
pair_coeff 1 6 -3.12 0.008709072
pair_coeff 1 7 -3.12 0.009309267
pair_coeff 1 8 -3.12 0.009978087
pair_coeff 1 9 -3.12 0.010721661
pair_coeff 1 10 -3.12 0.011551559
pair_coeff 1 11 -3.12 0.012481678
pair_coeff 2 2 -3.12 0.007208852
pair_coeff 2 3 -3.12 0.007661714
pair_coeff 2 4 -3.12 0.008158631
pair_coeff 2 5 -3.12 0.008705505
pair_coeff 2 6 -3.12 0.009309267
pair_coeff 2 7 -3.12 0.009973713
pair_coeff 2 8 -3.12 0.010716789
pair_coeff 2 9 -3.12 0.011546111
pair_coeff 2 10 -3.12 0.012475559
pair_coeff 2 11 -3.12 0.013521926
pair_coeff 3 3 -3.12 0.008158631
pair_coeff 3 4 -3.12 0.008705505
pair_coeff 3 5 -3.12 0.009309267
pair_coeff 3 6 -3.12 0.009978087
pair_coeff 3 7 -3.12 0.010716789
pair_coeff 3 8 -3.12 0.011546111
pair_coeff 3 9 -3.12 0.012475559
pair_coeff 3 10 -3.12 0.013521926
pair_coeff 3 11 -3.12 0.014705678
pair_coeff 4 4 -3.12 0.009309267
pair_coeff 4 5 -3.12 0.009978087
pair_coeff 4 6 -3.12 0.010721661
pair_coeff 4 7 -3.12 0.011546111
pair_coeff 4 8 -3.12 0.012475559
pair_coeff 4 9 -3.12 0.013521926
pair_coeff 4 10 -3.12 0.014705678
pair_coeff 4 11 -3.12 0.01605196
pair_coeff 5 5 -3.12 0.010721661
pair_coeff 5 6 -3.12 0.011551559
pair_coeff 5 7 -3.12 0.012475559
pair_coeff 5 8 -3.12 0.013521926
pair_coeff 5 9 -3.12 0.014705678
pair_coeff 5 10 -3.12 0.01605196
pair_coeff 5 11 -3.12 0.017591949
pair_coeff 6 6 -3.12 0.012481678
pair_coeff 6 7 -3.12 0.013521926
pair_coeff 6 8 -3.12 0.014705678
pair_coeff 6 9 -3.12 0.01605196
pair_coeff 6 10 -3.12 0.017591949
pair_coeff 6 11 -3.12 0.019364669
pair_coeff 7 7 -3.12 0.014697852
pair_coeff 7 8 -3.12 0.016043036
pair_coeff 7 9 -3.12 0.01758171
pair_coeff 7 10 -3.12 0.019352845
pair_coeff 7 11 -3.12 0.021405738
pair_coeff 8 8 -3.12 0.01758171
pair_coeff 8 9 -3.12 0.019352845
pair_coeff 8 10 -3.12 0.021405738
pair_coeff 8 11 -3.12 0.023803485
pair_coeff 9 9 -3.12 0.021405738
pair_coeff 9 10 -3.12 0.023803485
pair_coeff 9 11 -3.12 0.026627881
pair_coeff 10 10 -3.12 0.026627881
pair_coeff 10 11 -3.12 0.029986497
pair_coeff 11 11 -3.12 0.034023072

bond_style  harmonic
bond_coeff 1 200 13.81
bond_coeff 2 200 13.01
bond_coeff 3 200 12.21
bond_coeff 4 200 11.40
bond_coeff 5 200 10.60
bond_coeff 6 200 9.79
bond_coeff 7 200 8.99
bond_coeff 8 200 8.19
bond_coeff 9 200 7.38
bond_coeff 10 200 6.58

angle_style harmonic
angle_coeff 1 4.003364 180
angle_coeff 2 3.971087 180
angle_coeff 3 3.934807 180
angle_coeff 4 3.893194 180
angle_coeff 5 3.844494 180
angle_coeff 6 3.786931 180
angle_coeff 7 3.719111 180
angle_coeff 8 3.637751 180
angle_coeff 9 3.537456 180

neigh_modify every 1 delay 0 check yes
timestep    0.005
thermo_style    custom etotal ebond temp ke eangle evdwl pe pxx press pyy vol pzz density
thermo_modify   line multi

min_style   cg
minimize 1.0e-8 1.0e-10 100000 1000000

# Main run
fix   1 all nve
fix   2 all langevin 1.0 1.0 1.0 157812

thermo 10000
dump  1 all custom 1000 dump.lammpstrj id mol type x y z
run   10000000

write_data      final1.cfg
write_restart   bb.restart
clear
